# S4-EV(BKS)  0 K E-V 스캔 — **BKS 가 S4 에서 2e13 K/s 로 만든 망**을 BKS 로 읽는다.
#
# 왜 필요한가:
#   ev_s4_summary.dat 의 BKS 행은 s0_requench 의 5e12 K/s 망이라 S4 (2e13) 와
#   냉각률이 4배 다르다. 냉각률 성분을 완전히 빼려면 매칭 냉각률 망이 필요하다.
#   BKS 는 초 단위라 안 할 이유가 없다.
#
# in.ev_bks (s2_relax) 를 그대로 가져오되 두 가지만 바꿨다:
#   1) read_data 를 -var dfile 로 (prod_bks_2e13.data 를 읽기 위해)
#   2) tail 보정 기본값 ON — RESULTS 2절이 보고값으로 tail on 을 택했으므로
#      비교 대상과 장부를 맞춘다. (근거는 s0_requench/in.npt_tail 주석 참조)
#
# ⚠ 알려진 비대칭: in.ev_s4(7net)는 `minimize 0.0 1e-3 150 150` 으로 **eval 상한 150**
#   에서 멈추는데(7net 이 1스텝 2초라 불가피), 여기 BKS 는 `0.0 1e-5 20000 20000` 로
#   훨씬 조인다. 즉 **7net 행과 BKS 행은 이완 정도가 다르다.**
#   기존 ev220 vs ev_bks 도 똑같이 비대칭이었으므로 그 비교와는 일관되고,
#   이 프로젝트의 핵심 비교(7net이 BKS망 읽기 vs 7net이 자기망 읽기)는 **양쪽 다
#   150 상한**이라 영향받지 않는다. 다만 BKS 행을 7net 행과 직접 빼는 서술은 피할 것.
#
# 인자: -var s <선형 스케일>  -var dfile <구조>  -var tag <출력태그>  -var tail <0|1>
# 실행: run_ev_bks_s4.sh 참조

variable        dfile index prod_bks_2e13.data
variable        tag   index bks2e13
variable        s     index 1.0
variable        tail  index 1

units           metal
boundary        p p p
atom_style      charge

read_data       ${dfile}
mass            1 15.9994
mass            2 28.0855

pair_style      hybrid/overlay buck/coul/long 10.0 lj/cut 1.5
pair_coeff      1 1 buck/coul/long 1388.7730 0.362318 175.0000
pair_coeff      1 2 buck/coul/long 18003.7572 0.205205 133.5381
pair_coeff      2 2 buck/coul/long 0.0 1.0 0.0
pair_coeff      1 1 lj/cut 3.0 1.50 1.50
pair_coeff      1 2 lj/cut 4.0 1.10 1.10
pair_coeff      2 2 lj/cut 0.0 1.0  1.0
kspace_style    pppm 1.0e-6          # EOS 전용, BKS 는 초 단위 (s2_relax 와 동일)

if "${tail} == 1" then "pair_modify pair buck/coul/long tail yes"

neighbor        2.0 bin
neigh_modify    every 1 delay 0 check yes

change_box      all x scale ${s} y scale ${s} z scale ${s} remap

velocity        all set 0.0 0.0 0.0        # Press 를 순수 virial 로 (RESULTS 8절 교훈 3)

variable        epa  equal pe/atoms
variable        dens equal density
variable        fmag atom sqrt(fx*fx+fy*fy+fz*fz)
compute         maxf all reduce max v_fmag

thermo          100
thermo_style    custom step pe v_epa press vol v_dens c_maxf

min_style       cg
min_modify      dmax 0.05
minimize        0.0 1.0e-5 20000 20000

variable        Vf equal vol
variable        Df equal density
variable        Ef equal pe
variable        ef equal pe/atoms
variable        Pf equal press
variable        Ff equal c_maxf
print           "EVPOINT ${s} ${Vf} ${Df} ${Ef} ${ef} ${Pf} ${Ff}"
