# S4-EV  0 K E-V 스캔 @ **S4 자체 melt-quench 로 만든 망 위상**
#
# ─ 왜 NPT 가 아니라 E-V 인가 (2026-08-24 설계 변경) ───────────────────────────
#  원래 계획은 "300 K NPT tail 검증"이었다. 7net 의 P300 = +0.80 GPa (팽창 경향)이
#  BKS 세 런의 -2.8~-3.2 GPa 와 부호가 반대인데, 300 K 통계가 5 ps + 5 ps 로 짧아
#  미평형 아티팩트일 가능성을 배제하지 못했기 때문이다.
#
#  그런데 로그를 다시 읽어보니 **그 가능성은 이미 배제된다**:
#    7net 300 K 구간 10 ps(평형 5 + 생산 5) 전체에서
#      평형 전반 +0.781 / 후반 +0.774 / 생산 전반 +0.797 / 후반 +0.795 GPa
#    → 드리프트가 0.02 GPa 미만이고 요동 sd 는 0.11 GPa. **완전히 정상상태다.**
#    같은 구간 MSD 도 150.9 Å² 에서 3자리까지 고정 — 300 K 에서 확산이 없다.
#  즉 이 압력은 '아직 안 풀린 응력'이 아니라 **얼어붙은 망 위상 자체의 성질**이다.
#  300 K NVT 를 더 길게 끌어도 나올 것이 없다 (움직일 자유도가 없다).
#
#  남은 진짜 질문은 "그래서 이 망이 원하는 밀도가 얼마냐"이고, 그건 부피 자유도를
#  풀어야만 답이 나온다. 두 경로가 있다:
#    (i)  300 K NPT   — 7net 으로 100 ps NPT = 100,000 step x 1.96 s = **54 시간**. 불가.
#                       20 ps 로 줄여도 11 시간이고, 그마저 barostat 이 자리잡기에 짧다.
#    (ii) 0 K E-V 스캔 — 7점 x 최대 150 eval x 1.99 s ≈ **35 분**. 게다가
#                       RESULTS 2절의 rho0 = 2.2185 / K0 = 43.2 가 **정확히 이 방법**으로
#                       나온 값이라, 같은 자로 잰 직접 비교가 된다.
#  → (ii) 를 택한다. NPT 는 하지 않는다.
#
# ─ 이 스캔이 답하는 것 ────────────────────────────────────────────────────────
#  RESULTS 2절의 rho0 = 2.2185 (+0.84 %) 는 **BKS 가 만든 망 위에서** 7net 이 부피만
#  고른 값이다. 이번 스캔은 **7net 이 자기 힘으로 만든 망**에서 같은 값을 뽑는다.
#  두 값의 차이 = 밀도에서의 **위상 형성 효과**. ring 통계(fig_rings_s4.png)와 같은 축이다.
#  P300 = +0.80 GPa 와 K ~ 43 GPa 로 어림하면 rho0 ~ 2.16 (실험 대비 -1.8 %) 이 예상되는데,
#  그러면 "7net 이 밀도를 7.8배 개선했다"는 이 프로젝트의 헤드라인이 **위상까지 스스로
#  만들면 일부 되돌아간다**는 뜻이 된다. 확인해야 할 값이다. (예상은 예상일 뿐, 재본다.)
#
# ─ 인자 ──────────────────────────────────────────────────────────────────────
#   -var s     <선형 스케일>          f^(1/3), f = 부피비
#   -var dfile <출발 구조>            prod_7net_mq.data 등
#   -var tag   <출력 태그>
#
# 설계는 in.ev220 을 그대로 따른다 (같은 자로 재야 비교가 된다):
#   - velocity all set 0 0 0  : data 파일이 들고 온 300 K 속도를 죽여 Press 를 순수 virial 로
#                               (RESULTS 8절 교훈 3 — 이걸 안 하면 virial 이 3배 어긋나 보인다)
#   - etol = 0.0              : 에너지 수렴이 box 자유도에서 조기 종료를 일으킨다 (교훈 4)
#   - 원자만 이완, 셀은 고정   : E-V 스캔이므로 box/relax 를 쓰지 않는다
#
# 실행: run_ev_s4.sh 참조

variable        dfile index prod_7net_mq.data
variable        tag   index 7net
variable        s     index 1.0
variable        cap   index 1200        # minimize eval 상한. -var cap 으로 덮어쓸 수 있다.

units           metal
boundary        p p p
atom_style      charge

read_data       ${dfile}
mass            1 15.9994
mass            2 28.0855

pair_style      e3gnn
pair_coeff      * * ../../01_input/pot/deployed_nano_4.5.pt O Si

neighbor        1.0 bin
neigh_modify    every 1 delay 0 check yes

change_box      all x scale ${s} y scale ${s} z scale ${s} remap

velocity        all set 0.0 0.0 0.0

variable        epa  equal pe/atoms
variable        dens equal density
variable        fmag atom sqrt(fx*fx+fy*fy+fz*fz)
compute         maxf all reduce max v_fmag

thermo          20
thermo_style    custom step pe v_epa press vol v_dens c_maxf

min_style       cg
min_modify      dmax 0.05
minimize        0.0 1.0e-3 ${cap} ${cap}    # 2026-08-25: 150 -> 400 -> 가변(기본 1200).
#   ev220 도 150 으로 창 끝(f=0.94)에서 cap 에 걸렸다(2-norm 0.395). 이완된 구조에서
#   출발해도 큰 변형 점은 150 이 모자란다. 보통은 그 전에 "linesearch alpha is zero"
#   로 조기 종료하므로 실제 추가 비용은 창 끝 몇 점뿐이다.
#
# ★ 2026-08-25 (2차 진단). **ftol = 1.0e-3 은 이 시스템에서 도달 불가능한 값이다.**
#   400-cap 실행에서 정상 종료("linesearch alpha is zero")한 9 점의 최종 전역 힘
#   2-norm 이 0.016 ~ 0.035 eV/A 였다 — ftol 보다 20~35 배 크다. 즉 CG 는 ftol 을
#   만족해서 멈춘 적이 한 번도 없고, 항상 **수치 잡음 바닥에 닿아** 라인서치가
#   죽으면서 멈췄다. 2160 원자 MLIP 힘의 바닥이 거기다.
#   -> 따라서 "수렴했다"의 실질 판정선은 ftol 이 아니라
#      **(a) 종료 사유 = linesearch alpha is zero  AND
#        (b) 최종 2-norm 이 0.02~0.035 잡음 바닥 대역 안** 이다.
#      cap 을 올리는 것은 (a) 를 확보하기 위한 조치이지 ftol 을 맞추려는 게 아니다.
#      ftol 을 잡음 바닥 위로 올리는 것은 하지 않는다 — 그러면 점마다 다른 깊이에서
#      멈춰 P(V) 곡률이 다시 계통적으로 휜다(분석 12 와 같은 실패).

variable        Vf equal vol
variable        Df equal density
variable        Ef equal pe
variable        ef equal pe/atoms
variable        Pf equal press
variable        Ff equal c_maxf
print           "EVPOINT ${s} ${Vf} ${Df} ${Ef} ${ef} ${Pf} ${Ff}"
