# S4 BKS 통제런 (lightweight) — Tg(rate) 곡선 확장/반복용
# in.mqbks 에서 300K '생산' 단계(RDF 18 MB 궤적)를 뺐다. 남긴 것은
#   (1) mqbks_<tag>_profile.dat  — Tg 용
#   (2) prod_bks_<tag>.data      — ring statistics 용 (2026-08-24 추가, 아래 3단계 주석)
# 초기구조·셀·NVT 앙상블·300K 평형 길이는 in.mqbks 와 동일하다.
#
# 인자: -var ns <100K당 스텝수>  -var tag <출력태그>  -var seed <속도시드, 기본 90210>
#   냉각률(K/s) = 1e17 / ns   (예: ns=100000 -> 1e12,  ns=5000 -> 2e13)
#
# 실행 (s4_mq7net/ 에서):
#   mpirun -np 6 lmp_7net -in in.mqbks_fast -var ns 100000 -var tag 1e12 -var seed 90210 \
#       > logs/mqbks_1e12.log 2>&1

variable        ns    index 5000
variable        tag   index 2e13
variable        seed  index 90210

units           metal
boundary        p p p
atom_style      charge

read_data       ../s0_requench/melt4000.data
mass            1 15.9994
mass            2 28.0855

pair_style      hybrid/overlay buck/coul/long 10.0 lj/cut 1.5
pair_coeff      1 1 buck/coul/long 1388.7730 0.362318 175.0000
pair_coeff      1 2 buck/coul/long 18003.7572 0.205205 133.5381
pair_coeff      2 2 buck/coul/long 0.0 1.0 0.0
pair_coeff      1 1 lj/cut 3.0 1.50 1.50
pair_coeff      1 2 lj/cut 4.0 1.10 1.10
pair_coeff      2 2 lj/cut 0.0 1.0  1.0
kspace_style    pppm 1.0e-4

neighbor        2.0 bin
neigh_modify    every 1 delay 0 check yes

timestep        0.001
variable        Tdamp equal 0.1

compute         msd0  all msd
variable        epa   equal pe/atoms

thermo          1000
thermo_style    custom step temp press vol density pe v_epa c_msd0[4]

print "=========== BKS MELT EQUIL 4000 K (NVT, 20 ps) ==========="
velocity        all set 0.0 0.0 0.0
velocity        all create 4000.0 ${seed} dist gaussian mom yes

reset_timestep  0
fix             1 all nvt temp 4000.0 4000.0 ${Tdamp}
run             20000
unfix           1

print "# T_set(K)  epa(eV/atom)  Press(bar)  MSD(A^2)" file profiles/mqbks_${tag}_profile.dat screen no

print "=========== BKS QUENCH -> 300 K (NVT, 100 K x ${ns} step) ==========="
variable        Tset equal 4000
variable        nr   equal ${ns}/100

label QLOOP
  reset_timestep 0
  fix           q  all nvt temp ${Tset} ${Tset} ${Tdamp}
  fix           qa all ave/time 100 ${nr} ${ns} v_epa c_thermo_press c_msd0[4]
  run           ${ns}
  print         "${Tset} $(f_qa[1]) $(f_qa[2]) $(f_qa[3])" append profiles/mqbks_${tag}_profile.dat screen no
  unfix         qa
  unfix         q
  variable      Tset equal ${Tset}-100
if "${Tset} >= 300" then "jump SELF QLOOP"

# ================= 3. 300 K 평형 5 ps -> 구조 저장 =================
# 2026-08-24 추가. 원래 이 스크립트는 profile 만 뽑았는데, 그러면 스윕 결과로
# **ring statistics 를 낼 수 없다.** S4 ring 비교(fig_rings_s4.py)의 가장 약한 고리가
# "7net 은 시드 1개, BKS 도 매칭률(2e13)에서 실현 1개뿐이라 실현간 산포를 못 잰다"는
# 점인데, 스윕에 이미 2e13_r2 / 2e13_r3 반복이 들어 있다. 구조만 저장하면
# 매칭률에서 BKS 실현 3개가 생겨 **오차막대를 제대로 그릴 수 있다.**
# 평형 5 ps 는 in.mqbks 통제런과 길이를 맞춘 것이다 (구조 비교 조건 일치).
# 비용: 5,000 step / 557 step/s = 9 초/런. 궤적·RDF 는 여전히 안 만든다.
print "=========== BKS EQUIL 300 K (NVT, 5 ps) -> prod_bks_${tag}.data ==========="
reset_timestep  0
fix             1 all nvt temp 300.0 300.0 ${Tdamp}
run             5000
unfix           1
write_data      prod_bks_${tag}.data

print "=========== DONE ${tag} (profile + final structure) ==========="
