# S4-EV 0단계  0 K 이완 — E-V 스캔의 **출발 구조**를 만든다.
#
# ★ 왜 이 파일이 뒤늦게 생겼나 (2026-08-25, 프로토콜 오류 정정)
#   기존 7net E-V 는 2단계였다:
#     in.relax220 : 300 K 스냅샷 -> minimize 400 eval -> relaxed220.data
#                   (종료 "linesearch alpha is zero", force 2-norm 0.024, 13분)
#     in.ev220    : **이미 이완된** relaxed220.data 를 읽어 부피만 바꿔 150 eval
#   즉 150 eval 은 '최소점 근처를 살짝 미는' 용도였다.
#
#   그런데 in.ev_s4 는 in.ev220 의 minimize 설정만 베끼고 **그 전제를 안 지켰다** —
#   prod_*.data(300 K MD 스냅샷)를 직접 읽어 150 eval 을 줬다. 그 결과
#   **S4 스캔 14개 점이 전부 "max force evaluations" 로 잘렸다.**
#   덜 이완된 배치에서 읽은 virial P 로 BM3 를 피팅한 셈이고, 특히 곡률(K0')이
#   부피마다 다른 이완 잔차에 오염된다.
#
#   -> 옛 프로토콜과 **똑같이** 0단계를 복원한다. 이 파일이 그 0단계다.
#
# 인자: -var dfile <300K 스냅샷>  -var out <출력 구조>
# 비용: 400 eval 상한, 실측 기준 약 13분 (7net, 2160원자)
# 실행: run_ev_s4.sh 가 자동으로 먼저 부른다

variable        dfile index prod_7net_mq.data
variable        out   index relaxed_7net_mq.data

units           metal
boundary        p p p
atom_style      charge

read_data       ${dfile}
mass            1 15.9994
mass            2 28.0855

pair_style      e3gnn
pair_coeff      * * ../../01_input/pot/deployed_nano_4.5.pt O Si

neighbor        1.0 bin
neigh_modify    every 1 delay 0 check yes

velocity        all set 0.0 0.0 0.0        # Press 를 순수 virial 로 (RESULTS 8절 교훈 3)

variable        epa  equal pe/atoms
variable        dens equal density
variable        fmag atom sqrt(fx*fx+fy*fy+fz*fz)
compute         maxf all reduce max v_fmag

thermo          20
thermo_style    custom step pe v_epa press vol v_dens c_maxf

min_style       cg
min_modify      dmax 0.05
minimize        0.0 1.0e-3 400 400          # in.relax220 과 동일 설정

write_data      ${out}
print           "RELAXED ${out}  P = $(press) bar  maxf = $(c_maxf) eV/A  rho = $(density)"
